! manobra fechar
close line.CTR378512 term=1 !233454
open line.CTR230035 term=1 !53296

new energymeter.carga element=line.TR4010917,terminal=1

Set voltagebases=[13.800000000 0.24 0.22]
CalcVoltageBases
