clear
new circuit.alimBHHR10 bus1=BMT99044794.1.2.3,basekv=13.800000000,pu=1.040000000,r1=0,x1=0.0001

Redirect ..\0PermRes\NovasCurvasTxt\CurvasDeCargaDU.dss
Redirect ..\0PermRes\Condutores.dss
Redirect BHHR10SegmentosMT.dss
Redirect BHHR10ChavesMT.dss
Redirect BHHR10Transformadores.dss
Redirect BHHR10SegmentosBT.dss
Redirect BHHR10Ramais.dss
Redirect BHHR10CargaMT_Nov.dss
Redirect BHHR10CargaBT_Nov.dss

new energymeter.carga element=line.TR4873366,terminal=1

Set voltagebases=[13.800000000 0.24 0.22]
CalcVoltageBases

! Solve mode=daily,hour=0,number=24,stepsize=1h

BusCoords BHHR10CoordMT.csv
