clear
new circuit.alimFRUU14 bus1=BMT121682096,basekv=13.800000000,pu=1.040000000,r1=0,x1=0.0001

Redirect ..\0PermRes\NovasCurvasTxt\CurvasDeCargaDU.dss
Redirect ..\0PermRes\Condutores.dss
Redirect FRUU14SegmentosMT.dss
Redirect FRUU14ChavesMT.dss
Redirect FRUU14Reguladores.dss
Redirect FRUU14Transformadores.dss
Redirect FRUU14SegmentosBT.dss
Redirect FRUU14Ramais.dss
Redirect FRUU14CargaMT_Dez.dss
Redirect FRUU14CargaBT_Dez.dss
Redirect FRUU14GeradorMT_Dez.dss

new energymeter.carga element=line.SMT_1126857,terminal=1

Set voltagebases=[13.800000000 0.24 0.22]
CalcVoltageBases
Set MaxIter = 150
Set MaxControlIter = 40

! Solve mode=daily,hour=0,number=24,stepsize=1h


! BusCoords FRUU14CoordMT.csv
ClearBusMarkers
! AddBusMarker Bus= ,code=12,color=Green,size=5 ! substation
! AddBusMarker bus= ,code=27,color=Green,size=3 ! NC switch in Green
! AddBusMarker bus= ,code=27,color=Yellow,size=3 ! Yellow circle = NO switch to be closed
! plot circuit quantity=power,dots=n,labels=n,subs=y,showloops=n,C1=Blue,C2=Blue,C3=Red,R2=0.95,R3=0.90
