close line.CTRR39789 term=1 !253825
open line.CTRR39790 term=1 !253824

new energymeter.carga element=line.SMT_361859,terminal=1

Set voltagebases=[13.800000000 0.24 0.22]
CalcVoltageBases
Set MaxIter = 150
Set MaxControlIter = 40
