new capacitor.CAP210710-1 bus1=BMT165372839.1.0,Phases=1,Conn=LN,Kvar=100,Kv=13.8
new capacitor.CAP210710-2 bus1=BMT165372839.2.0,Phases=1,Conn=LN,Kvar=100,Kv=13.8
new capacitor.CAP210710-3 bus1=BMT165372839.3.0,Phases=1,Conn=LN,Kvar=100,Kv=13.8
