new capacitor.CAP292571-1 bus1=BMT102186247.1.0,Phases=1,Conn=LN,Kvar=100,Kv=13.8
new capacitor.CAP292571-2 bus1=BMT102186247.2.0,Phases=1,Conn=LN,Kvar=100,Kv=13.8
new capacitor.CAP292571-3 bus1=BMT102186247.3.0,Phases=1,Conn=LN,Kvar=100,Kv=13.8
