new capacitor.CAP198220-1 bus1=BMT164369356.1.0,Phases=1,Conn=LN,Kvar=200,Kv=13.8
new capacitor.CAP198220-2 bus1=BMT164369356.2.0,Phases=1,Conn=LN,Kvar=200,Kv=13.8
new capacitor.CAP198220-3 bus1=BMT164369356.3.0,Phases=1,Conn=LN,Kvar=200,Kv=13.8
