! manobra
close line.CTRR41905 term=1 ! 267983
open line.CTRR41100 term=1 ! 267984

new energymeter.carga element=line.TR1356865,terminal=1

Set voltagebases=[13.800000000 0.24 0.22]
CalcVoltageBases
