close line.CTR130109 term=1 ! 44055
open line.CTR41083 term=1 ! 44169

new energymeter.carga element=line.TR6641928,terminal=1

Set voltagebases=[13.800000000 0.24 0.22]
CalcVoltageBases
Set MaxIter = 150
Set MaxControlIter = 40
