close line.CTR871702 term=1 ! 248514
open line.CTR86573 term=1 ! 56763

new energymeter.carga element=line.SMT_1257785,terminal=1

Set voltagebases=[13.800000000 0.24 0.22]
CalcVoltageBases
Set MaxIter = 150
Set MaxControlIter = 40
