new capacitor.CAP290497-1 bus1=BMT161718317.1.0,Phases=1,Conn=LN,Kvar=100,Kv=13.8
new capacitor.CAP290497-2 bus1=BMT161718317.2.0,Phases=1,Conn=LN,Kvar=100,Kv=13.8
new capacitor.CAP290497-3 bus1=BMT161718317.3.0,Phases=1,Conn=LN,Kvar=100,Kv=13.8
