! manobra Mauro
close line.CTR101493 term=1 !79790
open line.CTRR37226 term=1 !330241

new energymeter.carga element=line.TR6624967,terminal=1

Set voltagebases=[13.800000000 0.24 0.22]
CalcVoltageBases
