! manobra
close line.CTR879979 term=1 !237583
open line.CTR592355 term=1 !52689

new energymeter.carga element=line.TR3408987,terminal=1

Set voltagebases=[13.800000000 0.24 0.22]
CalcVoltageBases

! conserto trecho isolado
close line.CTR90112 term=1
