close line.CTR17794 term=1  !274096
open line.CTRR40502  term=1 !274097

new energymeter.carga element=line.TRfic5,terminal=2

Set voltagebases=[13.800000000 0.24 0.22]
CalcVoltageBases
Set tolerance = 0.001
Set MaxIter = 200
Set MaxControlIter = 300
