new capacitor.CAP104021-1 bus1=BMT167453783.1.0,Phases=1,Conn=LN,Kvar=100,Kv=13.8
new capacitor.CAP104021-2 bus1=BMT167453783.2.0,Phases=1,Conn=LN,Kvar=100,Kv=13.8
new capacitor.CAP104021-3 bus1=BMT167453783.3.0,Phases=1,Conn=LN,Kvar=100,Kv=13.8
