!close line.CTRR42814 term=1 ! 280754
!open line.CTRR32563 term=1 ! 282199

new energymeter.carga element=line.TRfic5,terminal=2

Set voltagebases=[13.800000000 0.24 0.22]
CalcVoltageBases
Set tolerance = 0.001
Set MaxIter = 150
Set MaxControlIter = 40
